d1 := 0.7
d2 := 0.8
d3 := 1
d4 := 1.1
d5 := 1.2
d6 := 1.5
d7 := 1.7
d8 := 1.8
b := 0.1
Δtво := 0.05
Δdво := 0.05
Td := 0.08
Δtно := -0.05
Δdво_свыше1 := 0.1
TD := 0.15
Δdтр := 0
D1 := d1 + Δdво + 2*b + Δtво + 2*Δdтр + sqrt(Td^2 + TD^2 + Δtно^2) = 1.1772
D2 := d2 + Δdво + 2*b + Δtво + 2*Δdтр + sqrt(Td^2 + TD^2 + Δtно^2) = 1.2772
D3 := d3 + Δdво + 2*b + Δtво + 2*Δdтр + sqrt(Td^2 + TD^2 + Δtно^2) = 1.4772
D4 := d4 + Δdво_свыше1 + 2*b + Δtво + 2*Δdтр + sqrt(Td^2 + TD^2 + Δtно^2) = 1.6272
D5 := d5 + Δdво_свыше1 + 2*b + Δtво + 2*Δdтр + sqrt(Td^2 + TD^2 + Δtно^2) = 1.7272
D6 := d6 + Δdво_свыше1 + 2*b + Δtво + 2*Δdтр + sqrt(Td^2 + TD^2 + Δtно^2) = 2.0272
D7 := d7 + Δdво_свыше1 + 2*b + Δtво + 2*Δdтр + sqrt(Td^2 + TD^2 + Δtно^2) = 2.2272
D8 := d8 + Δdво_свыше1 + 2*b + Δtво + 2*Δdтр + sqrt(Td^2 + TD^2 + Δtно^2) = 2.3272
Dmax1 := D1 + 0.06 = 1.2372
Dmax5 := D5 + 0.06 = 1.7872
Dmax2 := D2 + 0.06 = 1.3372
Dmax6 := D6 + 0.06 = 2.0872
Dmax3 := D3 + 0.06 = 1.5372
Dmax7 := D7 + 0.06 = 2.2872
Dmax4 := D4 + 0.06 = 1.6872
Dmax8 := D8 + 0.06 = 2.3872
