L1 := 0.124
L2 := 0.144
L3 := 0.040
Sк := 2*(L1*L2 + L3*(L1 + L2)) = 0.057152  # м^2
Kз := 0.5
Sз := 2*(L1*L2 + Kз*L3*(L1 + L2)) = 0.046432  # м^2
U := 12
I := 1.5
Pпотребления := U*I = 18  # Вт
Kнагрузки := 0.5
P := Kнагрузки*Pпотребления = 9  # Вт
qз := P/Sз = 193.832  # Вт
qк := P/Sк = 157.475  # Вт
Q1 := 0.1472*qк - 0.2962*10^-3*qк^2 + 0.3127*10^-6*qк^3 = 17.0562
Q2 := 0.139*qз - 0.1223*10^-3*qз^2 + 0.0698*10^-6*qз^3 = 22.856
Н1 := 10^5
KН1 := 0.82 + 1/(0.925 + 4.6*10^-5*Н1) = 1.001
Н2 := 10^5
KН2 := 0.8 + 1/(1.25 + 5.8*10^-5*Н2) = 0.941844
Qк := Q1*KН1 = 17.0731
Qз := Qк + (Q2 - Q1)*KН2 = 22.5357
Tс := 40
Tк := Qк + Tс = 57.0731
Tз := Qз + Tс = 62.5357
