L1 := 0.115
L2 := 0.090
L3 := 0.080
Sк := 2*(L1*L2 + L3*(L1 + L2)) = 0.0535  # м^2
Kз := 0.3
Sз := 2*(L1*L2 + Kз*L3*(L1 + L2)) = 0.03054  # м^2
Pпотери := 120  # Вт
Kнагрузки := 0.4
P := Kнагрузки*Pпотери = 48  # Вт
qк := P/Sк = 897.196  # Вт
qз := P/Sз = 1571.71  # Вт
Q1 := 0.1472*qк - 0.2962*10^-3*qк^2 + 0.3127*10^-6*qк^3 = 119.472
Q2 := 0.139*qз - 0.12231*10^-3*qз^2 + 0.06981*10^-6*qз^3 = 187.369
Н1 := 10^5
KН1 := 0.82 + 1/(0.925 + 4.6*10^-5*Н1) = 1.001
Н2 := 10^5
KН2 := 0.8 + 1/(1.25 + 5.8*10^-5*Н2) = 0.941844
Qк := Q1*KН1 = 119.591
Qз := Qк + (Q2 - Q1)*KН2 = 183.54
Tс := 40
Tк := Qк + Tс = 159.591
Tз := Qз + Tс = 223.54
