a := 120
b := 80
Ka := 22.37*sqrt(1 + 0.61*(a/b)^2 + (a/b)^4) = 60.9967
E := 3.02*10^10
h := 1.5*10^-3
y := 0.22
D := E*h^3/(12*(1 - y)^2) = 13.9608
p := 2.05*10^3
mэ := 0.04582
a := 0.120
b := 0.080
m'' := p*h + mэ/(a*b) explicit; ALL → 2.05*10^3*1.5*10^-3 + 0.04582/(0.120*0.080) = 7.84792
f0 := Ka/(2*π*a)*sqrt(D/m'') explicit; ALL → 60.9967183666/(2*π*0.120)*sqrt(13.9607988166/7.84791666667) = 107.9
β := 35
g := 9.81
n_bmax := 57
fусл := nthroot(β*g*n_bmax/(0.003*b), 3) = 433.644
Az := n_bmax/(4*f0^2) = 0.00122396
