b1 := 0.29
b2 := 0.323
tn := 35
lnn1 := 2200
lnn2 := 803
ρ := 0.0175
R1 := ρ*lnn1/(b1*tn) = 3.7931  # Ом
R2 := ρ*lnn2/(b2*tn) = 1.24303  # Ом
γдоп := 48
Imax1 := 0.001*γдоп*b1*tn = 0.4872
Imax2 := 0.001*γдоп*b2*tn = 0.54264
ln1 := 1000
ξп := 6
ξл := 4
ln2 := 500
a := 1.41
ξr := 0.5*(ξп + ξл) = 5
C1 := 0.12*ξr*ln1/log(2*a/(b1 + tn), 10) = -546.746  # пФ
C2 := 0.12*ξr*ln2/log(2*a/(b1 + tn), 10) = -273.373  # пФ
L1_1 := 0.0002*lnn1*(log(2*lnn1/(b1 + tn), 10) + 0.2235*((b1 + tn)/lnn1) + 0.5) = 1.14373  # мкГн
L2_1 := 0.0004*ln1*(ln((a + b1)/(b1 + tn)) + (a - b1)/ln1 + 0.2235*((b1 + tn)/ln1) + 1.5) = -0.609586  # мкГн
L1_2 := 0.0002*lnn2*(log(2*lnn2/(b1 + tn), 10) + 0.2235*((b1 + tn)/lnn2) + 0.5) = 0.348167  # мкГн
L2_2 := 0.0004*ln2*(ln((a + b1)/(b1 + tn)) + (a - b1)/ln2 + 0.2235*((b1 + tn)/ln2) + 1.5) = -0.302991  # мкГн
