N := 1000
Нэрэ_скв := 29
Нэрэ_пов := 63 - Нэрэ_скв = 34
Nскв := N*Нэрэ_скв = 29000
Nпов := N*Нэрэ_пов = 34000
Кс := 0.55
Кб := (Кс*Nскв + 0.8*Nпов)/(Nскв + Nпов) = 0.684921
K := [1, 1, 0.83, 1, 0.55, 1, 0.33]
ϕ := [1, 1, 0.8, 0.5, 0.3, 0.2, 0.1]
К := sum(K[i]*ϕ[i], i = 1 .. 7)/sum(ϕ[i], i = 1 .. 7)  # error: Значение должно быть вектором.
