Зо := 18.25
Нд := 70
Рк := 129.89
Зд := Зо*Нд/100 = 12.775
Нсоц := 35
Рсоц := (Зо + Зд)*Нсоц/100 = 10.8588
Нн := 150
Рн := Зо*Нн/100 = 27.375
Спр := Рк + Зо + Зд + Рсоц + Рн = 199.149
Нком := 5
Рком := Спр*Нком/100 = 9.95744
Сп := Спр + Рком = 209.106
Нре := 45
-было_до_пересчёта_рентабильности
Нре := 22
Пед := Сп*Нре/100 = 46.0034
Цотп := Сп + Пед = 255.11
N1 := 1000
N2 := N1*1.2 = 1200
N3 := N2*1.2 = 1440
N4 := N3*1.2 = 1728
Нп := 18
Пч1 := N1*Пед*(1 - Нп/100) = 37722.8
Пч3 := N3*Пед*(1 - Нп/100) = 54320.8
Пч2 := N2*Пед*(1 - Нп/100) = 45267.3
Пч4 := N4*Пед*(1 - Нп/100) = 65184.9
at1 := 1
at2 := 0.8928
at3 := 0.7972
at4 := 0.7118
Пчt1 := Пч1*at1 = 37722.8
Пчt3 := Пч3*at3 = 43304.5
Пчt2 := Пч2*at2 = 40414.7
Пчt4 := Пч4*at4 = 46398.6
Пм := 0
dN2 := N2 - N1 = 200
dN3 := N3 - N2 = 240
dN4 := N4 - N3 = 288
Пк1 := Рк*N1 = 129890
Пк3 := Рк*dN3
Кприроста := 0.2
Пк2 := Рк*dN2
Пк4 := Рк*dN4
Иоб1 := Кприроста*(Пк1 + Пм) = 25978
Иоб2 := Кприроста*(Пк2 + Пм) = 5195.6
Иоб3 := Кприроста*(Пк3 + Пм) = 6234.72
Иоб4 := Кприроста*(Пк4 + Пм) = 7481.66
нЗо := 963.3
нРм := 62.65
нЗд := нЗо*0.7 = 674.31
нРсоц := (нЗо + нЗд)*35/100 = 573.163
нРн := нЗо*1.5 = 1444.95
нСр := нРм + нЗо + нЗд + нРсоц + нРн = 3718.37
нИраз := нСр = 3718.37
И1 := нИраз + Иоб1 = 29696.4
И3 := Иоб3 = 6234.72
И2 := Иоб2 = 5195.6
И4 := Иоб4 = 7481.66
Иt1 := И1*at1 = 29696.4
Иt3 := И3*at3 = 4970.32
Иt2 := И2*at2 = 4638.63
Иt4 := И4*at4 = 5325.45
ЧДД1 := at1*(Пч1 - И1) = 8026.38
ЧДД2 := at2*(Пч2 - И2) = 35776
ЧДД3 := at3*(Пч3 - И3) = 38334.2
ЧДД4 := at4*(Пч4 - И4) = 41073.2
ЧДДнараст_итог1 := ЧДД1 = 8026.38
ЧДДнараст_итог2 := ЧДДнараст_итог1 + ЧДД2 = 43802.4
ЧДДнараст_итог3 := ЧДДнараст_итог2 + ЧДД3 = 82136.6
ЧДДнараст_итог4 := ЧДДнараст_итог3 + ЧДД4 = 123210
Пчtср := (Пчt1 + Пчt2 + Пчt3 + Пчt4)/4 explicit; ALL → (37722.756225 + 40414.6521092 + 43304.5170181 + 46398.6280183)/4 = 41960.1
Ри := Пчtср/(Иt1 + Иt2 + Иt3 + Иt4)*100 = 94.0162
